Prototype 0
#Mach
0        ! AeroSandbox note: This is overwritten later to match the current OperatingPoint Mach during the AVL run.
#IYsym   IZsym   Zsym
0       0   0
#Sref    Cref    Bref
0.8438285709882725 0.4773218000431449 1.7678399999999983
#Xref    Yref    Zref
0 0 0
# CDp
0
#===============================================================================
SURFACE
wing
#Nchordwise  Cspace  [Nspanwise   Sspace]
12   1   12   1

YDUPLICATE
0

CDCL
#CL1  CD1  CL2  CD2  CL3  CD3
0 0 0 0 0 0

#--------------------------------------------------
SECTION
#Xle    Yle    Zle     Chord   Ainc  [Nspanwise   Sspace]
0 0 0 0.4773218 0

AFIL
avl/M2.avl.af0

CLAF
1.076655270605379  # Computed using rule from avl_doc.txt

CDCL
#CL1  CD1  CL2  CD2  CL3  CD3
0 0 0 0 0 0

CONTROL
#name, gain, Xhinge, XYZhvec, SgnDup
all_deflections 0 0.6 0 0 0 1
#--------------------------------------------------
SECTION
#Xle    Yle    Zle     Chord   Ainc  [Nspanwise   Sspace]
0 0.44196 0 0.4773218 0

AFIL
avl/M2.avl.af1

CLAF
1.076655270605379  # Computed using rule from avl_doc.txt

CDCL
#CL1  CD1  CL2  CD2  CL3  CD3
0 0 0 0 0 0

CONTROL
#name, gain, Xhinge, XYZhvec, SgnDup
all_deflections 0 0.6 0 0 0 1
CONTROL
#name, gain, Xhinge, XYZhvec, SgnDup
all_deflections 0 0.7 0 0 0 -1
#--------------------------------------------------
SECTION
#Xle    Yle    Zle     Chord   Ainc  [Nspanwise   Sspace]
0 0.88392 0 0.4773218 0

AFIL
avl/M2.avl.af2

CLAF
1.076655270605379  # Computed using rule from avl_doc.txt

CDCL
#CL1  CD1  CL2  CD2  CL3  CD3
0 0 0 0 0 0

CONTROL
#name, gain, Xhinge, XYZhvec, SgnDup
all_deflections 0 0.7 0 0 0 -1
#===============================================================================
SURFACE
horizontal_tail
#Nchordwise  Cspace  [Nspanwise   Sspace]
12   1   12   1

YDUPLICATE
0

CDCL
#CL1  CD1  CL2  CD2  CL3  CD3
0 0 0 0 0 0

#--------------------------------------------------
SECTION
#Xle    Yle    Zle     Chord   Ainc  [Nspanwise   Sspace]
1.2 0 0 0.14142136 -5

AFIL
avl/M2.avl.af3

CLAF
1.0924221254554969  # Computed using rule from avl_doc.txt

CDCL
#CL1  CD1  CL2  CD2  CL3  CD3
0 0 0 0 0 0

CONTROL
#name, gain, Xhinge, XYZhvec, SgnDup
all_deflections 0 0.7 0 0 0 1
#--------------------------------------------------
SECTION
#Xle    Yle    Zle     Chord   Ainc  [Nspanwise   Sspace]
1.2 0.35355339 0 0.14142136 -5

AFIL
avl/M2.avl.af4

CLAF
1.0924221254554969  # Computed using rule from avl_doc.txt

CDCL
#CL1  CD1  CL2  CD2  CL3  CD3
0 0 0 0 0 0

CONTROL
#name, gain, Xhinge, XYZhvec, SgnDup
all_deflections 0 0.7 0 0 0 1
#===============================================================================
SURFACE
vertical tail
#Nchordwise  Cspace  [Nspanwise   Sspace]
12   1   12   1

CDCL
#CL1  CD1  CL2  CD2  CL3  CD3
0 0 0 0 0 0

#--------------------------------------------------
SECTION
#Xle    Yle    Zle     Chord   Ainc  [Nspanwise   Sspace]
1.2 0 0 0.14142136 0

AFIL
avl/M2.avl.af5

CLAF
1.0924221254554969  # Computed using rule from avl_doc.txt

CDCL
#CL1  CD1  CL2  CD2  CL3  CD3
0 0 0 0 0 0

CONTROL
#name, gain, Xhinge, XYZhvec, SgnDup
all_deflections 0 0.75 0 0 0 1
#--------------------------------------------------
SECTION
#Xle    Yle    Zle     Chord   Ainc  [Nspanwise   Sspace]
1.2 0 0.2776718 0.14142136 0

AFIL
avl/M2.avl.af6

CLAF
1.0924221254554969  # Computed using rule from avl_doc.txt

CDCL
#CL1  CD1  CL2  CD2  CL3  CD3
0 0 0 0 0 0

CONTROL
#name, gain, Xhinge, XYZhvec, SgnDup
all_deflections 0 0.75 0 0 0 1
#==================================================
BODY
Untitled
24 1

BFIL
avl/M2.avl.fuse0

TRANSLATE
0 0 0

#==================================================
BODY
Untitled
24 1

BFIL
avl/M2.avl.fuse1

TRANSLATE
0 0 0
